Simulations: Version=192
  Experiment
    Factors
      Permutation
        Factor Fertiliser
          CompositeFactor 50Fert: Specifications=[Fertilise at sowing]
            Manager Fertilise at sowing
              Crop = [Maize]
              FertiliserType = NH4NO3N
              Amount1 = 20
              Amount2 = 50
              Amount3 = 35
              DAS2 = 35
              DAS3 = 65
```csharp
using Models.Soils;
using System;
using Models.Core;
using Models.PMF;

namespace Models
{
    [Serializable]
    public class Script : Model
    {
        [Link] Fertiliser Fertiliser;
        [Link] Clock Clock;

        [Description("Crop to be fertilised")]
        public IPlant Crop { get; set; }

        [Description("Type of fertiliser")]
        [Display(Type = DisplayType.FertiliserType)]
        public string FertiliserType { get; set; } = "NH4NO3N";

        [Description("1st application at sowing (kg/ha)")]
        public double Amount1 { get; set; } = 70;

        [Description("2nd application (kg/ha)")]
        public double Amount2 { get; set; } = 100;

        [Description("3rd application (kg/ha)")]
        public double Amount3 { get; set; } = 80;

        [Description("Days after sowing for 2nd application")]
        public int DAS2 { get; set; } = 30;

        [Description("Days after sowing for 3rd application")]
        public int DAS3 { get; set; } = 55;

        private DateTime sowingDate;
        private bool cropSown = false;
        private bool done2 = false;
        private bool done3 = false;

        [EventSubscribe("Sowing")]
        private void OnSowing(object sender, EventArgs e)
        {
            Model crop = sender as Model;

            if (Crop != null && crop.Name.Equals((Crop as IModel).Name, StringComparison.OrdinalIgnoreCase))
            {
                cropSown = true;
                sowingDate = Clock.Today;
                done2 = false;
                done3 = false;

                Fertiliser.Apply(amount: Amount1, type: FertiliserType);
            }
        }

        [EventSubscribe("DoManagement")]
        private void OnDoManagement(object sender, EventArgs e)
        {
            if (!cropSown)
                return;

            int das = (Clock.Today - sowingDate).Days;

            if (!done2 && das >= DAS2)
            {
                Fertiliser.Apply(amount: Amount2, type: FertiliserType);
                done2 = true;
            }

            if (!done3 && das >= DAS3)
            {
                Fertiliser.Apply(amount: Amount3, type: FertiliserType);
                done3 = true;
            }
        }

        [EventSubscribe("Harvesting")]
        private void OnHarvesting(object sender, EventArgs e)
        {
            cropSown = false;
        }
    }
}
```
          CompositeFactor 45Fert: Specifications=[Fertilise at sowing]
            Manager Fertilise at sowing
              Crop = [Maize]
              FertiliserType = NH4NO3N
              Amount1 = 18
              Amount2 = 45
              Amount3 = 31.5
              DAS2 = 35
              DAS3 = 65
              script: same as in Experiment.Factors.Permutation.Fertiliser.50Fert.Fertilise at sowing
          CompositeFactor 40Fert: Specifications=[Fertilise at sowing]
            Manager Fertilise at sowing
              Crop = [Maize]
              FertiliserType = NH4NO3N
              Amount1 = 16
              Amount2 = 40
              Amount3 = 28
              DAS2 = 35
              DAS3 = 65
              script: same as in Experiment.Factors.Permutation.Fertiliser.50Fert.Fertilise at sowing
          CompositeFactor 35Fert: Specifications=[Fertilise at sowing]
            Manager Fertilise at sowing
              Crop = [Maize]
              FertiliserType = NH4NO3N
              Amount1 = 14
              Amount2 = 35
              Amount3 = 24.5
              DAS2 = 35
              DAS3 = 65
              script: same as in Experiment.Factors.Permutation.Fertiliser.50Fert.Fertilise at sowing
          CompositeFactor 30Fert: Specifications=[Fertilise at sowing]
            Manager Fertilise at sowing
              Crop = [Maize]
              FertiliserType = NH4NO3N
              Amount1 = 12
              Amount2 = 30
              Amount3 = 21
              DAS2 = 35
              DAS3 = 65
              script: same as in Experiment.Factors.Permutation.Fertiliser.50Fert.Fertilise at sowing
          CompositeFactor 25Fert: Specifications=[Fertilise at sowing]
            Manager Fertilise at sowing
              Crop = [Maize]
              FertiliserType = NH4NO3N
              Amount1 = 10
              Amount2 = 25
              Amount3 = 17.5
              DAS2 = 35
              DAS3 = 65
              script: same as in Experiment.Factors.Permutation.Fertiliser.50Fert.Fertilise at sowing
          CompositeFactor 20Fert: Specifications=[Fertilise at sowing]
            Manager Fertilise at sowing
              Crop = [Maize]
              FertiliserType = NH4NO3N
              Amount1 = 8
              Amount2 = 20
              Amount3 = 14
              DAS2 = 35
              DAS3 = 65
              script: same as in Experiment.Factors.Permutation.Fertiliser.50Fert.Fertilise at sowing
          CompositeFactor 15Fert: Specifications=[Fertilise at sowing]
            Manager Fertilise at sowing
              Crop = [Maize]
              FertiliserType = NH4NO3N
              Amount1 = 6
              Amount2 = 15
              Amount3 = 10.5
              DAS2 = 35
              DAS3 = 65
              script: same as in Experiment.Factors.Permutation.Fertiliser.50Fert.Fertilise at sowing
          CompositeFactor 10Fert: Specifications=[Fertilise at sowing]
            Manager Fertilise at sowing
              Crop = [Maize]
              FertiliserType = NH4NO3N
              Amount1 = 4
              Amount2 = 10
              Amount3 = 7
              DAS2 = 35
              DAS3 = 65
              script: same as in Experiment.Factors.Permutation.Fertiliser.50Fert.Fertilise at sowing
          CompositeFactor 5Fert: Specifications=[Fertilise at sowing]
            Manager Fertilise at sowing
              Crop = [Maize]
              FertiliserType = NH4NO3N
              Amount1 = 2
              Amount2 = 5
              Amount3 = 3.5
              DAS2 = 35
              DAS3 = 65
              script: same as in Experiment.Factors.Permutation.Fertiliser.50Fert.Fertilise at sowing
          CompositeFactor 0Fert: Specifications=[Fertilise at sowing]
            Manager Fertilise at sowing
              Crop = [Maize]
              FertiliserType = NH4NO3N
              Amount1 = 0
              Amount2 = 0
              Amount3 = 0
              DAS2 = 35
              DAS3 = 65
              script: same as in Experiment.Factors.Permutation.Fertiliser.50Fert.Fertilise at sowing
        Factor Irri Strategy
          CompositeFactor 100Etc
            Specifications:
              [Weather]
              [Soil]
              [IrrigationFraction]
            Weather: Latitude=30.56; Tav=19.09; Amp=14.63
              FileName=C:\Users\Amine\workspace\morocco_maize\data\cmip6\renamed_files\CNRM-CM6-1_time_series_corrected.met
            Manager IrrigationFraction
              Crop = [Maize]
              AutoIrrigationOn = True
              IntervalDays = 1
              Fraction = 1
              RainEfficiency = 1
              EffRainCapFracOfETc = 1
              IrrigationEfficiency = 1
              MaxIrrigation = 6
              ApplyDepthMm = 0
              StartAfterDays = 10
              StopAfterDays = 95
              SowingMonth = 3
              SowingDay = 23
              Verbose = True
```csharp
using System;
using Models.Core;
using Models.Interfaces;

namespace Models
{
    [Serializable]
    public class Script : Model
    {
        [Link] private Irrigation irrigation = null;
        [Link] private Clock clock = null;
        [Link] private ISummary summary = null;
        [Link] private IWeather weather = null;
        [Link] private ISoilWater soilWater = null;

        // =======================
        // USER PARAMETERS
        // =======================

        [Description("Crop to irrigate (e.g., Maize)")]
        public IPlant Crop { get; set; }

        [Description("Activate automation")]
        public bool AutoIrrigationOn { get; set; } = true;

        [Description("Decision interval (days). Keep same for all treatments if you don't want to change frequency.")]
        public int IntervalDays { get; set; } = 2;

        [Description("Treatment fraction (1.0, 0.75, 0.5 ...)")]
        public double Fraction { get; set; } = 1.0;

        [Description("Rain efficiency (0-1). EffRainRaw = max(0, Rain-Runoff) * RainEfficiency")]
        public double RainEfficiency { get; set; } = 0.5;

        [Description("Cap effective rain used in irrigation balance as fraction of ETc (0-1). 1 = no cap.")]
        public double EffRainCapFracOfETc { get; set; } = 0.3;

        [Description("Irrigation efficiency (0-1). Net ≈ Gross * Eff")]
        public double IrrigationEfficiency { get; set; } = 1.0;

        [Description("Max gross mm per event at FULL (100%). 0 = unlimited. (Ratio kept exact)")]
        public double MaxIrrigation { get; set; } = 12.0;

        [Description("Where APSIM places irrigation water in soil (mm from surface). 0 = surface.")]
        public double ApplyDepthMm { get; set; } = 0.0;

        // --- Kc curve (simple FAO-like)
        public double KcIni { get; set; } = 0.30;
        public double KcMid { get; set; } = 1.15;
        public double KcEnd { get; set; } = 0.60;
        public int DaysIni { get; set; } = 20;
        public int DaysDev { get; set; } = 30;
        public int DaysMid { get; set; } = 40;
        public int DaysLate { get; set; } = 30;

        // --- irrigation window
        [Description("Start irrigation after DAS. 0 = start immediately")]
        public int StartAfterDays { get; set; } = 0;

        [Description("Stop irrigation after DAS. 0 = stop when crop ends")]
        public int StopAfterDays { get; set; } = 85;

        // --- IMPORTANT: fix DAS reference to sowing date (prevents emergence-based shift)
        [Description("Sowing month (used to define DAS=1 at sowing date).")]
        public int SowingMonth { get; set; } = 3;

        [Description("Sowing day (used to define DAS=1 at sowing date).")]
        public int SowingDay { get; set; } = 23;

        [Description("Write detailed messages")]
        public bool Verbose { get; set; } = true;

        // =======================
        // STATE
        // =======================
        private int daysSinceDecision = 0;
        private double sumETc = 0.0;
        private double sumEffRainRaw = 0.0;

        private bool wasAlive = false;
        private DateTime cropStart;

        private double seasonGrossIrr = 0.0;
        private double seasonETc = 0.0;
        private double seasonEffRainRaw = 0.0;
        private double seasonEffRainUsed = 0.0;

        [EventSubscribe("StartOfSimulation")]
        private void OnStart(object sender, EventArgs e)
        {
            if (Crop == null) throw new Exception("Crop not linked.");
            if (Fraction < 0 || Fraction > 1) throw new Exception("Fraction must be 0–1.");
            if (IntervalDays < 1) throw new Exception("IntervalDays must be >= 1.");
            if (RainEfficiency < 0 || RainEfficiency > 1) throw new Exception("RainEfficiency must be 0–1.");
            if (EffRainCapFracOfETc < 0 || EffRainCapFracOfETc > 1) throw new Exception("EffRainCapFracOfETc must be 0–1.");
            if (IrrigationEfficiency <= 0 || IrrigationEfficiency > 1) throw new Exception("IrrigationEfficiency must be (0,1].");
            if (ApplyDepthMm < 0) throw new Exception("ApplyDepthMm must be >= 0.");
            if (SowingMonth < 1 || SowingMonth > 12) throw new Exception("SowingMonth must be 1–12.");
            if (SowingDay < 1 || SowingDay > 31) throw new Exception("SowingDay must be 1–31.");

            daysSinceDecision = 0;
            sumETc = 0.0;
            sumEffRainRaw = 0.0;
            wasAlive = false;

            seasonGrossIrr = 0.0;
            seasonETc = 0.0;
            seasonEffRainRaw = 0.0;
            seasonEffRainUsed = 0.0;

            summary?.WriteMessage(this,
                $"ETc STRICT (soilWater.Eo*Kc): Fraction={Fraction:P0}, IntervalDays={IntervalDays}, StartAfterDays={StartAfterDays}, StopAfterDays={StopAfterDays}, " +
                $"RainEff={RainEfficiency:F2}, EffRainCapFracOfETc={EffRainCapFracOfETc:F2}, IrrEff={IrrigationEfficiency:F2}, " +
                $"MaxIrr(Full)={MaxIrrigation:F1}, ApplyDepthMm={ApplyDepthMm:F0}, Sowing={SowingDay:D2}/{SowingMonth:D2}",
                MessageType.Information);
        }

        [EventSubscribe("EndOfDay")]
        private void OnEndOfDay(object sender, EventArgs e)
        {
            if (!AutoIrrigationOn || Crop == null) return;

            // When crop becomes alive (often at emergence), force cropStart to sowing date
            if (Crop.IsAlive && !wasAlive)
            {
                cropStart = new DateTime(clock.Today.Year, SowingMonth, SowingDay);
                wasAlive = true;

                if (Verbose)
                    summary?.WriteMessage(this,
                        $"Crop alive on {clock.Today:d}. Using cropStart (sowing date) = {cropStart:d}",
                        MessageType.Information);
            }

            if (!Crop.IsAlive)
            {
                wasAlive = false;
                return;
            }

            int das = (clock.Today - cropStart).Days + 1;
            if (das < 1) return; // before sowing date in that year

            if (StartAfterDays > 0 && das < StartAfterDays) return;
            if (StopAfterDays > 0 && das > StopAfterDays) return;

            // ETc estimate
            double eo = Math.Max(0.0, soilWater.Eo);
            double kc = GetKc(das);
            double etcToday = eo * kc;

            // Raw effective rain (after efficiency)
            double effRainRaw = Math.Max(0.0, weather.Rain - soilWater.Runoff) * RainEfficiency;

            sumETc += etcToday;
            sumEffRainRaw += effRainRaw;

            seasonETc += etcToday;
            seasonEffRainRaw += effRainRaw;
        }

        [EventSubscribe("DoManagement")]
        private void OnDoManagement(object sender, EventArgs e)
        {
            if (!AutoIrrigationOn || Crop == null || !Crop.IsAlive)
            {
                daysSinceDecision = 0;
                sumETc = 0.0;
                sumEffRainRaw = 0.0;
                return;
            }

            int das = (clock.Today - cropStart).Days + 1;
            if (das < 1) return;

            if (StartAfterDays > 0 && das < StartAfterDays) return;
            if (StopAfterDays > 0 && das > StopAfterDays) return;

            daysSinceDecision++;
            if (daysSinceDecision < IntervalDays) return;

            // Cap effective rain used in the balance
            double effRainUsed = sumEffRainRaw;
            if (EffRainCapFracOfETc < 1.0)
                effRainUsed = Math.Min(sumEffRainRaw, EffRainCapFracOfETc * sumETc);

            seasonEffRainUsed += effRainUsed;

            // Full net need over interval
            double fullNeedNet = Math.Max(0.0, sumETc - effRainUsed);

            // Convert to gross at FULL
            double grossFull = (fullNeedNet > 0) ? (fullNeedNet / IrrigationEfficiency) : 0.0;

            // Cap per event at FULL (keeps ratios exact)
            if (MaxIrrigation > 0 && grossFull > MaxIrrigation)
                grossFull = MaxIrrigation;

            // Apply fraction AFTER capping => exact 100/75/50
            double gross = Fraction * grossFull;

            if (gross > 0)
            {
                irrigation.Apply(gross, depth: ApplyDepthMm);
                seasonGrossIrr += gross;

                if (Verbose)
                {
                    summary?.WriteMessage(this,
                        $"Irr {clock.Today:d}: DAS={das} SumETc={sumETc:F1} EffRainRaw={sumEffRainRaw:F1} EffRainUsed={effRainUsed:F1} " +
                        $"FullNeedNet={fullNeedNet:F1} GrossFull={grossFull:F1} Fraction={Fraction:P0} Applied={gross:F1}",
                        MessageType.Information);
                }
            }

            // Reset interval sums (strict, no catch-up)
            daysSinceDecision = 0;
            sumETc = 0.0;
            sumEffRainRaw = 0.0;
        }

        [EventSubscribe("EndOfSimulation")]
        private void OnEnd(object sender, EventArgs e)
        {
            summary?.WriteMessage(this,
                $"SEASON TOTALS: ETc={seasonETc:F1} mm, EffRainRaw={seasonEffRainRaw:F1} mm, EffRainUsed={seasonEffRainUsed:F1} mm, " +
                $"GrossIrr={seasonGrossIrr:F1} mm, Fraction={Fraction:P0}, IntervalDays={IntervalDays}, MaxIrr(Full)={MaxIrrigation:F1}",
                MessageType.Information);
        }

        private double GetKc(int das)
        {
            int d1 = Math.Max(1, DaysIni);
            int d2 = Math.Max(0, DaysDev);
            int d3 = Math.Max(0, DaysMid);
            int d4 = Math.Max(0, DaysLate);

            if (das <= d1) return KcIni;

            if (das <= d1 + d2 && d2 > 0)
            {
                double f = (das - d1) / (double)d2;
                return KcIni + f * (KcMid - KcIni);
            }

            if (das <= d1 + d2 + d3) return KcMid;

            if (das <= d1 + d2 + d3 + d4 && d4 > 0)
            {
                double f = (das - (d1 + d2 + d3)) / (double)d4;
                return KcMid + f * (KcEnd - KcMid);
            }

            return KcEnd;
        }
    }
}
```
            Soil 75mmsoil: SoilType=Loam; Site=Generic; State=Generic; Country=Africa; ApsoilNumber=995-Generic; Latitude=-20.074444; Longitude=30.832778; YearOfSampling=0
              Physical
                Thickness  ParticleSizeSand  ParticleSizeSilt  ParticleSizeClay  Rocks  BD    AirDry  LL15   DUL    SAT
                250        48                32                20                0      1.46  0.12    0.137  0.354  0.449
                250        44                34                22                0      1.45  0.125   0.148  0.34   0.453
                250        50                26                24                0      1.47  0.14    0.159  0.334  0.445
                SoilCrop maizeSoil: LL=[0.137, 0.148, 0.159]; KL=[0.06, 0.06, 0.06]; XF=[1, 1, 1]
              WaterBalance SoilWater: SummerDate=1-Nov; SummerU=0.5; SummerCona=0.5; WinterDate=1-Apr; WinterU=0.5; WinterCona=0.5; DiffusConst=40; DiffusSlope=16; Salb=0.12; CN2Bare=73; CNRed=20; CNCov=0.8; PSIDul=-100; Thickness=[250, 250, 250]; SWCON=[0.5, 0.5, 0.5]
              Chemical: PHUnits=Water
                Thickness  PH    EC    CEC
                250        8.33  0.18  9.3
                250        8.25  0.29  10.1
                250        8.41  0.21  10.9
              Nutrient
              Organic: FOMCNRatio=12; CarbonUnits=Total
                Thickness  Carbon  SoilCNRatio  FBiom  FInert  FOM
                250        1.2     12           0.035  0.8     700
                250        0.5     12           0.022  0.85    0
                250        0.22    12           0.01   0.9     0
              Solute NO3: Thickness=[250, 250, 250]; InitialValues=[0.7, 0.3, 0.12]; InitialValuesUnits=ppm; WaterTableConcentration=0; D0=0; DepthConstant=0; MaxDepthSoluteAccessible=0; RunoffEffectivenessAtMovingSolute=0; MaxEffectiveRunoff=0
              Solute NH4: Thickness=[250, 250, 250]; InitialValues=[0.5, 0.5, 0.5]; InitialValuesUnits=ppm; WaterTableConcentration=0; D0=0; DepthConstant=0; MaxDepthSoluteAccessible=0; RunoffEffectivenessAtMovingSolute=0; MaxEffectiveRunoff=0
              Solute Urea: Thickness=[250, 250, 250]; InitialValues=[0, 0, 0]; InitialValuesUnits=ppm; WaterTableConcentration=0; D0=0; DepthConstant=0; MaxDepthSoluteAccessible=0; RunoffEffectivenessAtMovingSolute=0; MaxEffectiveRunoff=0
              Water: Thickness=[250, 250, 250]; InitialValues=[0.137, 0.148, 0.159]; InitialPAWmm=0; RelativeTo=maize; FilledFromTop=true
              SoilTemperature Temperature
          CompositeFactor 95Etc
            Specifications:
              [Weather]
              [Soil]
              [IrrigationFraction]
            Weather: Latitude=30.56; Tav=19.09; Amp=14.63
              FileName=C:\Users\Amine\workspace\morocco_maize\data\cmip6\renamed_files\CNRM-CM6-1_time_series_corrected.met
            Manager IrrigationFraction
              Crop = [Maize]
              AutoIrrigationOn = True
              IntervalDays = 1
              Fraction = 0.95
              RainEfficiency = 1
              EffRainCapFracOfETc = 1
              IrrigationEfficiency = 1
              MaxIrrigation = 6
              ApplyDepthMm = 0
              StartAfterDays = 10
              StopAfterDays = 95
              SowingMonth = 3
              SowingDay = 23
              Verbose = True
              script: same as in Experiment.Factors.Permutation.Irri Strategy.100Etc.IrrigationFraction
            Soil 75mmsoil: same as Experiment.Factors.Permutation.Irri Strategy.100Etc.75mmsoil
          CompositeFactor 90Etc
            Specifications:
              [Weather]
              [Soil]
              [IrrigationFraction]
            Weather: Latitude=30.56; Tav=19.09; Amp=14.63
              FileName=C:\Users\Amine\workspace\morocco_maize\data\cmip6\renamed_files\CNRM-CM6-1_time_series_corrected.met
            Manager IrrigationFraction
              Crop = [Maize]
              AutoIrrigationOn = True
              IntervalDays = 1
              Fraction = 0.9
              RainEfficiency = 1
              EffRainCapFracOfETc = 1
              IrrigationEfficiency = 1
              MaxIrrigation = 6
              ApplyDepthMm = 0
              StartAfterDays = 10
              StopAfterDays = 95
              SowingMonth = 3
              SowingDay = 23
              Verbose = True
              script: same as in Experiment.Factors.Permutation.Irri Strategy.100Etc.IrrigationFraction
            Soil 75mmsoil: same as Experiment.Factors.Permutation.Irri Strategy.100Etc.75mmsoil
          CompositeFactor 85Etc
            Specifications:
              [Weather]
              [Soil]
              [IrrigationFraction]
            Weather: Latitude=30.56; Tav=19.09; Amp=14.63
              FileName=C:\Users\Amine\workspace\morocco_maize\data\cmip6\renamed_files\CNRM-CM6-1_time_series_corrected.met
            Manager IrrigationFraction
              Crop = [Maize]
              AutoIrrigationOn = True
              IntervalDays = 1
              Fraction = 0.85
              RainEfficiency = 1
              EffRainCapFracOfETc = 1
              IrrigationEfficiency = 1
              MaxIrrigation = 6
              ApplyDepthMm = 0
              StartAfterDays = 10
              StopAfterDays = 95
              SowingMonth = 3
              SowingDay = 23
              Verbose = True
              script: same as in Experiment.Factors.Permutation.Irri Strategy.100Etc.IrrigationFraction
            Soil 75mmsoil: same as Experiment.Factors.Permutation.Irri Strategy.100Etc.75mmsoil
          CompositeFactor 80Etc
            Specifications:
              [Weather]
              [Soil]
              [IrrigationFraction]
            Weather: Latitude=30.56; Tav=19.09; Amp=14.63
              FileName=C:\Users\Amine\workspace\morocco_maize\data\cmip6\renamed_files\CNRM-CM6-1_time_series_corrected.met
            Manager IrrigationFraction
              Crop = [Maize]
              AutoIrrigationOn = True
              IntervalDays = 1
              Fraction = 0.8
              RainEfficiency = 1
              EffRainCapFracOfETc = 1
              IrrigationEfficiency = 1
              MaxIrrigation = 6
              ApplyDepthMm = 0
              StartAfterDays = 10
              StopAfterDays = 95
              SowingMonth = 3
              SowingDay = 23
              Verbose = True
              script: same as in Experiment.Factors.Permutation.Irri Strategy.100Etc.IrrigationFraction
            Soil 75mmsoil: same as Experiment.Factors.Permutation.Irri Strategy.100Etc.75mmsoil
          CompositeFactor 75Etc
            Specifications:
              [Weather]
              [Soil]
              [IrrigationFraction]
            Weather: Latitude=30.56; Tav=19.09; Amp=14.63
              FileName=C:\Users\Amine\workspace\morocco_maize\data\cmip6\renamed_files\CNRM-CM6-1_time_series_corrected.met
            Manager IrrigationFraction
              Crop = [Maize]
              AutoIrrigationOn = True
              IntervalDays = 1
              Fraction = 0.75
              RainEfficiency = 1
              EffRainCapFracOfETc = 1
              IrrigationEfficiency = 1
              MaxIrrigation = 6
              ApplyDepthMm = 0
              StartAfterDays = 10
              StopAfterDays = 95
              SowingMonth = 3
              SowingDay = 23
              Verbose = True
              script: same as in Experiment.Factors.Permutation.Irri Strategy.100Etc.IrrigationFraction
            Soil 75mmsoil: same as Experiment.Factors.Permutation.Irri Strategy.100Etc.75mmsoil
          CompositeFactor 70Etc
            Specifications:
              [Weather]
              [Soil]
              [IrrigationFraction]
            Weather: Latitude=30.56; Tav=19.09; Amp=14.63
              FileName=C:\Users\Amine\workspace\morocco_maize\data\cmip6\renamed_files\CNRM-CM6-1_time_series_corrected.met
            Manager IrrigationFraction
              Crop = [Maize]
              AutoIrrigationOn = True
              IntervalDays = 1
              Fraction = 0.7
              RainEfficiency = 1
              EffRainCapFracOfETc = 1
              IrrigationEfficiency = 1
              MaxIrrigation = 6
              ApplyDepthMm = 0
              StartAfterDays = 10
              StopAfterDays = 95
              SowingMonth = 3
              SowingDay = 23
              Verbose = True
              script: same as in Experiment.Factors.Permutation.Irri Strategy.100Etc.IrrigationFraction
            Soil 75mmsoil: same as Experiment.Factors.Permutation.Irri Strategy.100Etc.75mmsoil
          CompositeFactor 65Etc
            Specifications:
              [Weather]
              [Soil]
              [IrrigationFraction]
            Weather: Latitude=30.56; Tav=19.09; Amp=14.63
              FileName=C:\Users\Amine\workspace\morocco_maize\data\cmip6\renamed_files\CNRM-CM6-1_time_series_corrected.met
            Manager IrrigationFraction
              Crop = [Maize]
              AutoIrrigationOn = True
              IntervalDays = 1
              Fraction = 0.65
              RainEfficiency = 1
              EffRainCapFracOfETc = 1
              IrrigationEfficiency = 1
              MaxIrrigation = 6
              ApplyDepthMm = 0
              StartAfterDays = 10
              StopAfterDays = 95
              SowingMonth = 3
              SowingDay = 23
              Verbose = True
              script: same as in Experiment.Factors.Permutation.Irri Strategy.100Etc.IrrigationFraction
            Soil 75mmsoil: same as Experiment.Factors.Permutation.Irri Strategy.100Etc.75mmsoil
          CompositeFactor 60Etc
            Specifications:
              [Weather]
              [Soil]
              [IrrigationFraction]
            Weather: Latitude=30.56; Tav=19.09; Amp=14.63
              FileName=C:\Users\Amine\workspace\morocco_maize\data\cmip6\renamed_files\CNRM-CM6-1_time_series_corrected.met
            Manager IrrigationFraction
              Crop = [Maize]
              AutoIrrigationOn = True
              IntervalDays = 1
              Fraction = 0.6
              RainEfficiency = 1
              EffRainCapFracOfETc = 1
              IrrigationEfficiency = 1
              MaxIrrigation = 6
              ApplyDepthMm = 0
              StartAfterDays = 10
              StopAfterDays = 95
              SowingMonth = 3
              SowingDay = 23
              Verbose = True
              script: same as in Experiment.Factors.Permutation.Irri Strategy.100Etc.IrrigationFraction
            Soil 75mmsoil: same as Experiment.Factors.Permutation.Irri Strategy.100Etc.75mmsoil
          CompositeFactor 55Etc
            Specifications:
              [Weather]
              [Soil]
              [IrrigationFraction]
            Weather: Latitude=30.56; Tav=19.09; Amp=14.63
              FileName=C:\Users\Amine\workspace\morocco_maize\data\cmip6\renamed_files\CNRM-CM6-1_time_series_corrected.met
            Manager IrrigationFraction
              Crop = [Maize]
              AutoIrrigationOn = True
              IntervalDays = 1
              Fraction = 0.55
              RainEfficiency = 1
              EffRainCapFracOfETc = 1
              IrrigationEfficiency = 1
              MaxIrrigation = 6
              ApplyDepthMm = 0
              StartAfterDays = 10
              StopAfterDays = 95
              SowingMonth = 3
              SowingDay = 23
              Verbose = True
              script: same as in Experiment.Factors.Permutation.Irri Strategy.100Etc.IrrigationFraction
            Soil 75mmsoil: same as Experiment.Factors.Permutation.Irri Strategy.100Etc.75mmsoil
        Factor SSP
          CompositeFactor Baseline-2000-M1
            Specifications:
              [Weather]
              [Clock]
            Weather: Latitude=30.56; Tav=19.09; Amp=14.63
              FileName=C:\Users\Amine\workspace\morocco_maize\data\cmip6\renamed_files\CNRM-CM6-1_time_series_corrected.met
            Clock: Start=1985-01-01; End=2014-12-15
          CompositeFactor Baseline-2000-M2
            Specifications:
              [Weather]
              [Clock]
            Weather: Latitude=30.56; Tav=19.09; Amp=14.63
              FileName=C:\Users\Amine\workspace\morocco_maize\data\cmip6\renamed_files\INM-CM5-0_time_series_corrected.met
            Clock: Start=1985-01-01; End=2014-12-15
          CompositeFactor Baseline-2000-M3
            Specifications:
              [Weather]
              [Clock]
            Weather: Latitude=30.56; Tav=19.09; Amp=14.63
              FileName=C:\Users\Amine\workspace\morocco_maize\data\cmip6\renamed_files\IPSL-CM6A-LR_time_series_corrected.met
            Clock: Start=1985-01-01; End=2014-12-15
          CompositeFactor Baseline-2000-M4
            Specifications:
              [Weather]
              [Clock]
            Weather: Latitude=30.56; Tav=19.09; Amp=14.63
              FileName=C:\Users\Amine\workspace\morocco_maize\data\cmip6\renamed_files\MIROC6_time_series_corrected.met
            Clock: Start=1985-01-01; End=2014-12-15
          CompositeFactor Baseline-2000-M5
            Specifications:
              [Weather]
              [Clock]
            Weather: Latitude=30.56; Tav=19.09; Amp=14.63
              FileName=C:\Users\Amine\workspace\morocco_maize\data\cmip6\renamed_files\NESM3_time_series_corrected.met
            Clock: Start=1985-01-01; End=2014-12-15
          CompositeFactor SSP245-2050-M1
            Specifications:
              [Weather]
              [Clock]
            Weather: Latitude=30.56; Tav=19.09; Amp=14.63
              FileName=C:\Users\Amine\workspace\morocco_maize\data\cmip6\renamed_files-2024-2063\CNRM-CM6-1_ssp245_time_series_corrected.met
              CO2Value: FileName=%root%\Examples\WeatherFiles\co2_ssp245_nv.csv; ConstantValue=0
            Clock: Start=2024-01-01; End=2060-12-15
          CompositeFactor SSP245-2050-M2
            Specifications:
              [Weather]
              [Clock]
            Weather: Latitude=30.56; Tav=19.09; Amp=14.63
              FileName=C:\Users\Amine\workspace\morocco_maize\data\cmip6\renamed_files-2024-2063\INM-CM5-0_ssp245_time_series_corrected.met
              CO2Value: FileName=%root%\Examples\WeatherFiles\co2_ssp245_nv.csv; ConstantValue=0
            Clock: Start=2024-01-01; End=2060-12-15
          CompositeFactor SSP245-2050-M3
            Specifications:
              [Weather]
              [Clock]
            Weather: Latitude=30.56; Tav=19.09; Amp=14.63
              FileName=C:\Users\Amine\workspace\morocco_maize\data\cmip6\renamed_files-2024-2063\IPSL-CM6A-LR_ssp245_time_series_corrected.met
              CO2Value: FileName=%root%\Examples\WeatherFiles\co2_ssp245_nv.csv; ConstantValue=0
            Clock: Start=2024-01-01; End=2060-12-15
          CompositeFactor SSP245-2050-M4
            Specifications:
              [Weather]
              [Clock]
            Weather: Latitude=30.56; Tav=19.09; Amp=14.63
              FileName=C:\Users\Amine\workspace\morocco_maize\data\cmip6\renamed_files-2024-2063\MIROC6_ssp245_time_series_corrected.met
              CO2Value: FileName=%root%\Examples\WeatherFiles\co2_ssp245_nv.csv; ConstantValue=0
            Clock: Start=2024-01-01; End=2060-12-15
          CompositeFactor SSP245-2050-M5
            Specifications:
              [Weather]
              [Clock]
            Weather: Latitude=30.56; Tav=19.09; Amp=14.63
              FileName=C:\Users\Amine\workspace\morocco_maize\data\cmip6\renamed_files-2024-2063\NESM3_ssp245_time_series_corrected.met
              CO2Value: FileName=%root%\Examples\WeatherFiles\co2_ssp245_nv.csv; ConstantValue=0
            Clock: Start=2024-01-01; End=2060-12-15
          CompositeFactor SSP585-2050-M1
            Specifications:
              [Weather]
              [Clock]
            Weather: Latitude=30.56; Tav=19.09; Amp=14.63
              FileName=C:\Users\Amine\workspace\morocco_maize\data\cmip6\renamed_files-2024-2063-SSP585\CNRM-CM6-1_ssp585_time_series_corrected.met
              CO2Value: FileName=%root%\Examples\WeatherFiles\co2_ssp585_nv.csv; ConstantValue=0
            Clock: Start=2024-01-01; End=2060-12-15
          CompositeFactor SSP585-2050-M2
            Specifications:
              [Weather]
              [Clock]
            Weather: Latitude=30.56; Tav=19.09; Amp=14.63
              FileName=C:\Users\Amine\workspace\morocco_maize\data\cmip6\renamed_files-2024-2063-SSP585\INM-CM5-0_ssp585_time_series_corrected.met
              CO2Value: FileName=%root%\Examples\WeatherFiles\co2_ssp585_nv.csv; ConstantValue=0
            Clock: Start=2024-01-01; End=2060-12-15
          CompositeFactor SSP585-2050-M3
            Specifications:
              [Weather]
              [Clock]
            Weather: Latitude=30.56; Tav=19.09; Amp=14.63
              FileName=C:\Users\Amine\workspace\morocco_maize\data\cmip6\renamed_files-2024-2063-SSP585\IPSL-CM6A-LR_ssp585_time_series_corrected.met
              CO2Value: FileName=%root%\Examples\WeatherFiles\co2_ssp585_nv.csv; ConstantValue=0
            Clock: Start=2024-01-01; End=2060-12-15
          CompositeFactor SSP585-2050-M4
            Specifications:
              [Weather]
              [Clock]
            Weather: Latitude=30.56; Tav=19.09; Amp=14.63
              FileName=C:\Users\Amine\workspace\morocco_maize\data\cmip6\renamed_files-2024-2063-SSP585\MIROC6_ssp585_time_series_corrected.met
              CO2Value: FileName=%root%\Examples\WeatherFiles\co2_ssp585_nv.csv; ConstantValue=0
            Clock: Start=2024-01-01; End=2060-12-15
          CompositeFactor SSP585-2050-M5
            Specifications:
              [Weather]
              [Clock]
            Weather: Latitude=30.56; Tav=19.09; Amp=14.63
              FileName=C:\Users\Amine\workspace\morocco_maize\data\cmip6\renamed_files-2024-2063-SSP585\NESM3_ssp585_time_series_corrected.met
              CO2Value: FileName=%root%\Examples\WeatherFiles\co2_ssp585_nv.csv; ConstantValue=0
            Clock: Start=2024-01-01; End=2060-12-15
          CompositeFactor SSP245-2100-M1
            Specifications:
              [Weather]
              [Clock]
            Weather: Latitude=30.56; Tav=19.09; Amp=14.63
              FileName=C:\Users\Amine\workspace\morocco_maize\data\cmip6\renamed_files-2060-2090\CNRM-CM6-1_ssp245_time_series_corrected.met
              CO2Value: FileName=%root%\Examples\WeatherFiles\co2_ssp245_nv.csv; ConstantValue=0
            Clock: Start=2060-01-01; End=2100-12-15
          CompositeFactor SSP245-2100-M2
            Specifications:
              [Weather]
              [Clock]
            Weather: Latitude=30.56; Tav=19.09; Amp=14.63
              FileName=C:\Users\Amine\workspace\morocco_maize\data\cmip6\renamed_files-2060-2090\INM-CM5-0_ssp245_time_series_corrected.met
              CO2Value: FileName=%root%\Examples\WeatherFiles\co2_ssp245_nv.csv; ConstantValue=0
            Clock: Start=2060-01-01; End=2100-12-15
          CompositeFactor SSP245-2100-M3
            Specifications:
              [Weather]
              [Clock]
            Weather: Latitude=30.56; Tav=19.09; Amp=14.63
              FileName=C:\Users\Amine\workspace\morocco_maize\data\cmip6\renamed_files-2060-2090\IPSL-CM6A-LR_ssp245_time_series_corrected.met
              CO2Value: FileName=%root%\Examples\WeatherFiles\co2_ssp245_nv.csv; ConstantValue=0
            Clock: Start=2060-01-01; End=2100-12-15
          CompositeFactor SSP245-2100-M4
            Specifications:
              [Weather]
              [Clock]
            Weather: Latitude=30.56; Tav=19.09; Amp=14.63
              FileName=C:\Users\Amine\workspace\morocco_maize\data\cmip6\renamed_files-2060-2090\MIROC6_ssp245_time_series_corrected.met
              CO2Value: FileName=%root%\Examples\WeatherFiles\co2_ssp245_nv.csv; ConstantValue=0
            Clock: Start=2060-01-01; End=2100-12-15
          CompositeFactor SSP245-2100-M5
            Specifications:
              [Weather]
              [Clock]
            Weather: Latitude=30.56; Tav=19.09; Amp=14.63
              FileName=C:\Users\Amine\workspace\morocco_maize\data\cmip6\renamed_files-2060-2090\NESM3_ssp245_time_series_corrected.met
              CO2Value: FileName=%root%\Examples\WeatherFiles\co2_ssp245_nv.csv; ConstantValue=0
            Clock: Start=2060-01-01; End=2100-12-15
          CompositeFactor SSP585-2100-M1
            Specifications:
              [Weather]
              [Clock]
            Weather: Latitude=30.56; Tav=19.09; Amp=14.63
              FileName=C:\Users\Amine\workspace\morocco_maize\data\cmip6\renamed_files-2060-2090-SSP585\CNRM-CM6-1_ssp585_time_series_corrected.met
              CO2Value: FileName=%root%\Examples\WeatherFiles\co2_ssp585_nv.csv; ConstantValue=0
            Clock: Start=2060-01-01; End=2100-12-15
          CompositeFactor SSP585-2100-M2
            Specifications:
              [Weather]
              [Clock]
            Weather: Latitude=30.56; Tav=19.09; Amp=14.63
              FileName=C:\Users\Amine\workspace\morocco_maize\data\cmip6\renamed_files-2060-2090-SSP585\INM-CM5-0_ssp585_time_series_corrected.met
              CO2Value: FileName=%root%\Examples\WeatherFiles\co2_ssp585_nv.csv; ConstantValue=0
            Clock: Start=2060-01-01; End=2100-12-15
          CompositeFactor SSP585-2100-M3
            Specifications:
              [Weather]
              [Clock]
            Weather: Latitude=30.56; Tav=19.09; Amp=14.63
              FileName=C:\Users\Amine\workspace\morocco_maize\data\cmip6\renamed_files-2060-2090-SSP585\IPSL-CM6A-LR_ssp585_time_series_corrected.met
              CO2Value: FileName=%root%\Examples\WeatherFiles\co2_ssp585_nv.csv; ConstantValue=0
            Clock: Start=2060-01-01; End=2100-12-15
          CompositeFactor SSP585-2100-M4
            Specifications:
              [Weather]
              [Clock]
            Weather: Latitude=30.56; Tav=19.09; Amp=14.63
              FileName=C:\Users\Amine\workspace\morocco_maize\data\cmip6\renamed_files-2060-2090-SSP585\MIROC6_ssp585_time_series_corrected.met
              CO2Value: FileName=%root%\Examples\WeatherFiles\co2_ssp585_nv.csv; ConstantValue=0
            Clock: Start=2060-01-01; End=2100-12-15
          CompositeFactor SSP585-2100-M5
            Specifications:
              [Weather]
              [Clock]
            Weather: Latitude=30.56; Tav=19.09; Amp=14.63
              FileName=C:\Users\Amine\workspace\morocco_maize\data\cmip6\renamed_files-2060-2090-SSP585\NESM3_ssp585_time_series_corrected.met
              CO2Value: FileName=%root%\Examples\WeatherFiles\co2_ssp585_nv.csv; ConstantValue=0
            Clock: Start=2060-01-01; End=2100-12-15
    Simulation Simulatis
      Clock: Start=1970-01-01; End=1970-12-15
      Summary
      Weather: Latitude=30.56; Tav=19.09; Amp=14.63
        FileName=C:\Users\Amine\workspace\morocco_maize\data\cmip6\renamed_files\CNRM-CM6-1_time_series_corrected.met
      SoilArbitrator
      MicroClimate: a_interception=0; b_interception=1; c_interception=0; d_interception=0; SoilHeatFluxFraction=0.4; MinimumHeightDiffForNewLayer=0; NightInterceptionFraction=0.5; ReferenceHeight=2
      Zone Field: Area=1; Slope=0; AspectAngle=0; Altitude=200
        Report: EventNames=[Clock].EndOfDay
          VariableNames:
            [Clock].Today.DayOfYear-[Maize].SowingDate.DayOfYear+1
            [Clock].Today
            [Maize].WaterUptake
            [Maize].Phenology.CurrentStageName
            [Maize].AboveGround.Wt/100 as ABGB(t-ha)
            [Irrigation].IrrigationApplied
            sum([Soil].NO3.kgha + [Soil].NH4.kgha) as Nres_kg_ha
            ([Soil].NO3.kgha[1] + [Soil].NH4.kgha[1]) as Nresss
            [Maize].Leaf.FW
            [Weather].Rain
            ([Soil].NO3.kgha[1] + [Soil].NH4.kgha[1]) as HN1
            ([Soil].NO3.kgha[2] + [Soil].NH4.kgha[2]) as HN2
            ([Soil].NO3.kgha[3] + [Soil].NH4.kgha[3]) as HN3
        Fertiliser
        SurfaceOrganicMatter: InitialResidueName=maize; InitialResidueType=inert; InitialResidueMass=0; InitialStandingFraction=0; InitialCPR=0; InitialCNR=0
        Manager Reset on date
          ResetDate = 23-Mar
          OffsetDays = 0
          ResetWater = True
          ResetNutrients = True
          ResetSOM = True
```csharp
using Models.Soils.Nutrients;
using APSIM.Shared.Utilities;
using Models.Surface;
using Models.Utilities;
using Models.Soils.Nutrients;
using Models.Soils;
using Models.PMF;
using Models.Core;
using System;
using System.Linq;
using Models.Interfaces;

namespace Models
{
    [Serializable]
    public class Script : Model
    {
        [Link] private Clock Clock;
        [Link] private Plant Wheat;
        [Link] private ISoilWater SoilWater;
        [Link] private Nutrient nutrient;
        [Link] private SurfaceOrganicMatter SOM;
        [Link] private Summary Summary;

        [Description("Date to reset on:")]
        public string ResetDate {get;set;}
        
        [Description("Offset by Days (Negative is Days Before, Positive is Days After):")]
        public int OffsetDays {get;set;}

        [Description("Reset Water?")]
        public bool ResetWater {get;set;}

        [Description("Reset Soil Nutrients?")]
        public bool ResetNutrients {get;set;}

        [Description("Reset Surface Organic Matter?")]
        public bool ResetSOM {get;set;}

        [EventSubscribe("DoManagement")]
        private void OnDoManagement(object sender, EventArgs e)
        {
            DateTime offsetDate = DateUtilities.GetDate(ResetDate, Clock.Today).AddDays(OffsetDays);
            if (offsetDate.Equals(Clock.Today))
            {
                if (ResetWater)
                {
                    Summary.WriteMessage(this, "Reset Water", MessageType.Diagnostic);
                    SoilWater.Reset();
                }
                if (ResetNutrients)
                {
                    Summary.WriteMessage(this, "Reset Nitrogen", MessageType.Diagnostic);
                    nutrient.Reset();
                }
                if (ResetSOM)
                {
                    Summary.WriteMessage(this, "Reset Surface OM", MessageType.Diagnostic);
                    SOM.Reset();
                }
            }
        }
    }
}
```
        Manager Sow on a fixed date
          Crop = [Maize]
          SowDate = 23-Mar
          CultivarName = A__1
          SowingDepth = 30
          RowSpacing = 750
          Population = 10
```csharp
using APSIM.Shared.Utilities;
using Models.Utilities;
using Models.Soils;
using Models.PMF;
using Models.Core;
using System;
using System.Linq;

namespace Models
{
    [Serializable]
    public class Script : Model
    {
        [Link] Clock Clock;
        [Link] Fertiliser Fertiliser;
        [Link] Summary Summary;
        [Link] Soil Soil;
        
        [Description("Crop")]
        public IPlant Crop { get; set; }

        [Description("Sowing date (d-mmm)")]
        public string SowDate { get; set; }

        [Display(Type = DisplayType.CultivarName)]
        [Description("Cultivar to be sown")]
        public string CultivarName { get; set; }

        [Description("Sowing depth (mm)")]
        public double SowingDepth { get; set; }

        [Description("Row spacing (mm)")]
        public double RowSpacing { get; set; }

        [Description("Plant population (/m2)")]
        public double Population { get; set; }

        [EventSubscribe("DoManagement")]
        private void OnDoManagement(object sender, EventArgs e)
        {
            if (DateUtilities.WithinDates(SowDate, Clock.Today, SowDate))
            {
                Crop.Sow(population: Population, cultivar: CultivarName, depth: SowingDepth, rowSpacing: RowSpacing);    
            }
        }
    }
}
```
        Manager Reset on sowing
          ResetMineralN = True
          CropName = Maize
          NO3Name = NO3
          NH4Name = NH4
```csharp
using System;
using System.Reflection;
using Models.Core;

namespace Models
{
    [Serializable]
    public class Script : Model
    {
        [Link] private Summary Summary = null;

        [Description("Reset only mineral N (NO3+NH4) at sowing")]
        public bool ResetMineralN { get; set; } = true;

        [Description("Crop model name which triggers reset (e.g. Maize). Leave empty = any crop sowing.")]
        public string CropName { get; set; } = "Maize";

        [Description("Name of NO3 model in soil")]
        public string NO3Name { get; set; } = "NO3";

        [Description("Name of NH4 model in soil")]
        public string NH4Name { get; set; } = "NH4";

        private IModel no3Model, nh4Model;
        private PropertyInfo no3KghaProp, nh4KghaProp;
        private double[] no3Init, nh4Init;

        [EventSubscribe("Commencing")]
        private void OnCommencing(object sender, EventArgs e)
        {
            // ✅ Cherche NO3/NH4 en remontant dans l’arbre jusqu’à trouver le sol
            IModel scope = this.Parent as IModel; // parent = Manager
            while (scope != null)
            {
                var n3 = FindDescendantByName(scope, NO3Name);
                var n4 = FindDescendantByName(scope, NH4Name);
                if (n3 != null && n4 != null)
                {
                    no3Model = n3;
                    nh4Model = n4;
                    break;
                }
                scope = scope.Parent; // remonter (Soil -> Field -> Simulation)
            }

            if (no3Model == null || nh4Model == null)
                throw new Exception(
                    $"Cannot find '{NO3Name}' and '{NH4Name}' in the scope above this Manager. " +
                    $"Check the solute names in the tree (case-sensitive) or move the Manager under the Soil node."
                );

            no3KghaProp = GetKghaPropertyOrThrow(no3Model, NO3Name);
            nh4KghaProp = GetKghaPropertyOrThrow(nh4Model, NH4Name);

            no3Init = (double[])((double[])no3KghaProp.GetValue(no3Model)).Clone();
            nh4Init = (double[])((double[])nh4KghaProp.GetValue(nh4Model)).Clone();

            Summary?.WriteMessage(this, $"Stored initial {NO3Name}/{NH4Name} profiles (kgha).", MessageType.Diagnostic);
        }

        [EventSubscribe("Sowing")]
        private void OnSowing(object sender, EventArgs e)
        {
            if (!ResetMineralN)
                return;

            // Filtrer par plante (sender est souvent le modèle plante)
            if (!string.IsNullOrWhiteSpace(CropName) && sender is IModel s)
            {
                if (!string.Equals(s.Name, CropName, StringComparison.OrdinalIgnoreCase))
                    return;
            }

            // ✅ Reset uniquement NO3/NH4 (pas d’eau, pas SOM, pas Nutrient.Reset)
            no3KghaProp.SetValue(no3Model, (double[])no3Init.Clone());
            nh4KghaProp.SetValue(nh4Model, (double[])nh4Init.Clone());

            Summary?.WriteMessage(this, $"Reset mineral N ({NO3Name}+{NH4Name}) at sowing.", MessageType.Diagnostic);
        }

        private static PropertyInfo GetKghaPropertyOrThrow(IModel model, string label)
        {
            var p = model.GetType().GetProperty("kgha", BindingFlags.Instance | BindingFlags.Public);
            if (p == null)
                throw new Exception($"Model '{label}' does not have public property 'kgha'.");
            if (p.PropertyType != typeof(double[]))
                throw new Exception($"Model '{label}'.kgha is not double[]. Found: {p.PropertyType}.");
            return p;
        }

        private static IModel FindDescendantByName(IModel root, string name)
        {
            if (root == null) return null;
            if (string.Equals(root.Name, name, StringComparison.OrdinalIgnoreCase))
                return root;

            foreach (var childObj in root.Children)
                if (childObj is IModel child)
                {
                    var found = FindDescendantByName(child, name);
                    if (found != null)
                        return found;
                }
            return null;
        }
    }
}
```
        Soil 75mmsoil: same as Experiment.Factors.Permutation.Irri Strategy.100Etc.75mmsoil
        Plant Maize
          Cultivar A__1
            Command:
              [Phenology].Emerging.Target.ShootLag.FixedValue=45
              [Phenology].Juvenile.Target.FixedValue = 152
              [Phenology].FlagLeafToFlowering.Target.FixedValue = 54
              [Phenology].FloweringToGrainFilling.Target.FixedValue = 100
              [Phenology].GrainFilling.Target.FixedValue = 550
              [Phenology].MaturityToHarvestRipe.Target.FixedValue = 10
              [Leaf].Photosynthesis.RUE.FixedValue = 2.1
        Irrigation
        Manager IrrigationFraction
          Crop = [Maize]
          AutoIrrigationOn = True
          IntervalDays = 1
          Fraction = 0
          RainEfficiency = 1
          EffRainCapFracOfETc = 1
          IrrigationEfficiency = 1
          MaxIrrigation = 6
          ApplyDepthMm = 0
          StartAfterDays = 10
          StopAfterDays = 95
          SowingMonth = 3
          SowingDay = 23
          Verbose = True
          script: same as in Experiment.Factors.Permutation.Irri Strategy.100Etc.IrrigationFraction
        Manager Fertilise at sowing
          Crop = [Maize]
          FertiliserType = NH4NO3N
          Amount1 = 50
          Amount2 = 110
          Amount3 = 90
          DAS2 = 35
          DAS3 = 65
          script: same as in Experiment.Factors.Permutation.Fertiliser.50Fert.Fertilise at sowing
        Manager HarvestingRule
```csharp
using Models.PMF.Phen;
using APSIM.Shared.Utilities;
using System.Xml.Serialization;
using Models;
using Models.PMF;
using Models.Soils;
using System.Text;
using System.Collections.Generic;
using Models.Core;
using System;
using Models.Soils.Nutrients;

namespace Models
{
    [Serializable] 
    public class Script : Model
    {
        [Link(ByName = true)] private Plant Maize;
        [Link] private Zone zone;
        [Link(Type = LinkType.Path, Path = "[Maize].Phenology")]
        private Phenology phenology;
                    
        
        [EventSubscribe("StartOfSimulation")]
        private void OnSimulationCommencing(object sender, EventArgs e)
        {
        }
        
        [EventSubscribe("DoManagement")]
        private void OnDoManagement(object sender, EventArgs e)
        {
            if (phenology.CurrentPhase.Name == "ReadyForHarvesting")
            {
                Maize.Harvest();
                Maize.EndCrop();
            }
        }
        
        [EventSubscribe("DoManagementCalculations")]
        private void OnDoManagementCalculations(object sender, EventArgs e)
        {
            
        }
    }
}
```
  DataStore
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