Simulations: Version=192
  Simulation Simulatis
    Clock: Start=03/23/2024; End=07/14/2024
    Summary
    Weather: Latitude=30.520017; Tav=14.7951; Amp=18.3
      FileName=C:\Users\Amine\workspace\morocco_maize\APSIM tout les code et figure\apsim calibration\input_calibration\climatee24.met
    SoilArbitrator
    MicroClimate: a_interception=0; b_interception=1; c_interception=0; d_interception=0; SoilHeatFluxFraction=0.4; MinimumHeightDiffForNewLayer=0; NightInterceptionFraction=0.5; ReferenceHeight=2
    Zone Field: Area=1; Slope=0; AspectAngle=0; Altitude=200
      Report
        VariableNames:
          [Clock].Today
          [Clock].Today.DayOfYear-[Maize].SowingDate.DayOfYear+1
          [Maize].Phenology.CurrentStageName
          [Phenology].AccumulatedTT
          [Phenology].ThermalTime
          [Maize].AboveGround.Wt/100 as ABGB(t-ha)
          [Maize].AboveGround.N
          [Maize].Grain.Total.Wt/100 as Yield
          [Maize].Grain.Wt
          [Maize].Grain.Size
          [Maize].Grain.NumberFunction
          [Maize].Grain.Total.Wt
          [Maize].Grain.N
          [Maize].Total.Wt
          [Maize].Leaf.LAI
          [Soil].NH4.ppm
          [Soil].NO3.ppm
          sum([Soil].Water.MM) as TotalSWC
          sum([Soil].Physical.DULmm) as TotalDUL
          sum([Soil].Physical.LL15mm) as TotalLL15
          [Irrigation].IrrigationApplied as IrrigationApplied
          sum of [Weather].Rain from [Maize].Sowing to [Maize].Harvesting as MaizeInCropRain
          (sum([Soil].Water.MM) - sum([Soil].Physical.LL15mm)) / (sum([Soil].Physical.DULmm) - sum([Soil].Physical.LL15mm)) as DailyWaterStressIndex
          [Maize].WaterUptake
          [Weather].Rain from [Maize].Sowing to [Maize].Harvesting as MaizeInCropRain
          [Soil].Nutrient.NO3.kgha
          [Soil].SoilWater.Drainage
          [Soil].SoilWater.Eo
          [Soil].SoilWater.Es
          [Soil].SoilWater.pond
          [Soil].SoilWater.Runoff
          [Soil].SoilWater.SWmm
          [Maize].Arbitrator.DM.Allocated
          [Maize].Arbitrator.DM.TotalPlantDemand
          [Maize].Arbitrator.DM.NutrientLimitation
          [Maize].Arbitrator.DM.SinkLimitation
          [Maize].Arbitrator.DM.TotalFixationSupply
          [Maize].Arbitrator.N.TotalPlantDemand
          [Maize].Arbitrator.N.TotalPlantSupply
          [Maize].Arbitrator.N.Allocated
          [Maize].Leaf.AppearedCohortNo
          [Maize].Leaf.CohortParameters.MaximumNConc
          [Maize].Leaf.CohortParameters.MinimumNConc
          [Maize].Leaf.CoverDead
          [Maize].Leaf.CoverGreen
          [Maize].Leaf.CoverTotal
          [Maize].Leaf.Dead.N
          [Maize].Leaf.Dead.Wt
          [Maize].Leaf.DeadCohortNo
          [Maize].Leaf.ExpandedCohortNo
          [Maize].Leaf.ExpandingCohortNo
          [Maize].Leaf.Fn
          [Maize].Leaf.FW
          [Maize].Leaf.LAI
          [Maize].Leaf.LAIDead
          [Maize].Leaf.Live.N
          [Maize].Leaf.Live.NConc
          [Maize].Leaf.Live.Wt
          [Maize].Leaf.Photosynthesis.FT
          [Maize].Leaf.Photosynthesis.FVPD
          [Maize].Leaf.PlantAppearedGreenLeafNo
          [Maize].Leaf.SenescingCohortNo
          [Maize].Leaf.SpecificArea
          [Maize].Leaf.Transpiration
          [Maize].Leaf.PotentialEP
          [Maize].Phenology.CurrentPhaseName
          [Maize].Phenology.Stage
          [Maize].Root.Dead.N
          [Maize].Root.Dead.NConc
          [Maize].Root.Dead.Wt
          [Maize].Root.Depth
          [Maize].Root.Live.N
          [Maize].Root.Live.NConc
          [Maize].Root.Live.Wt
          [Maize].Root.MaximumNConc
          [Maize].Root.MinimumNConc
          [Maize].Root.NUptake
          [Maize].Root.WaterUptake
          [Maize].Stem.Dead.N
          [Maize].Stem.Dead.NConc
          [Maize].Stem.Dead.Wt
          [Maize].Stem.Live.N
          [Maize].Stem.Live.NConc
          [Maize].Stem.Live.StorageWt
          [Maize].Stem.Live.StructuralWt
          [Maize].Stem.Live.Wt
          [Maize].Stem.MaximumNConc
          [Maize].Stem.MinimumNConc
          [Maize].Structure.Height
          [Maize].Structure.LeafTipsAppeared
          [Maize].Structure.FinalLeafNumber
          [Maize].Structure.PlantTotalNodeNo
          [Maize].Structure.PrimaryBudTotalNodeNo
          [Maize].Structure.TotalStemPopn
          [Maize].AboveGround.N
          [Maize].AboveGround.Wt
          [Maize].BelowGround.N
          [Maize].BelowGround.Wt
          [Maize].Total.N
          [Maize].Total.Wt
          [Maize].TotalDead.N
          [Maize].TotalDead.Wt
          [Maize].TotalLive.N
          [Maize].TotalLive.Wt
          [Maize].Leaf.InitialisedCohortNo
          sum([Soil].Urea.kgha[1:3] + [Soil].NH4.kgha[1:3] + [Soil].NO3.kgha[1:3]) as MineralN
          [Maize].AboveGround.N*10 as MaizeN
        EventNames:
          [Clock].EndOfDay
          [Maize].Harvesting
      Fertiliser
      SurfaceOrganicMatter: InitialResidueName=maize; InitialResidueType=maize; InitialResidueMass=500; InitialStandingFraction=0; InitialCPR=0; InitialCNR=20
      Soil 75mmsoil: SoilType=Loam; Site=Generic; State=Generic; Country=Africa; ApsoilNumber=995-Generic; Latitude=-20.074444; Longitude=30.832778; YearOfSampling=0
        Physical
          Thickness  ParticleSizeSand  ParticleSizeSilt  ParticleSizeClay  Rocks  BD    AirDry  LL15   DUL    SAT
          250        48                32                20                0      1.46  0.12    0.137  0.354  0.449
          250        44                34                22                0      1.45  0.125   0.148  0.34   0.453
          250        50                26                24                0      1.47  0.14    0.159  0.334  0.445
          SoilCrop maizeSoil: LL=[0.137, 0.148, 0.159]; KL=[0.06, 0.06, 0.06]; XF=[1, 1, 1]
        WaterBalance SoilWater: SummerDate=1-Nov; SummerU=0.5; SummerCona=0.5; WinterDate=1-Apr; WinterU=0.5; WinterCona=0.5; DiffusConst=40; DiffusSlope=16; Salb=0.12; CN2Bare=73; CNRed=20; CNCov=0.8; PSIDul=-100; Thickness=[250, 250, 250]; SWCON=[0.5, 0.5, 0.5]
        Organic: FOMCNRatio=12; CarbonUnits=Total
          Thickness  Carbon  SoilCNRatio  FBiom  FInert  FOM
          250        0.954   12           0.08   0.4     67
          250        0.954   12           0.07   0.6     45.3
          250        0.962   12           0.04   0.8     30.3
        Chemical: PHUnits=Water
          Thickness  PH    EC    CEC
          250        8.33  0.18  9.3
          250        8.25  0.29  10.1
          250        8.41  0.21  10.9
        Nutrient
        Solute NO3: Thickness=[250, 250, 250]; InitialValues=[3.588, 2.745, 0.655]; InitialValuesUnits=ppm; WaterTableConcentration=0; D0=0; DepthConstant=0; MaxDepthSoluteAccessible=0; RunoffEffectivenessAtMovingSolute=0; MaxEffectiveRunoff=0
        Solute NH4: Thickness=[250, 250, 250]; InitialValues=[0.281, 0.371, 0.281]; InitialValuesUnits=ppm; WaterTableConcentration=0; D0=0; DepthConstant=0; MaxDepthSoluteAccessible=0; RunoffEffectivenessAtMovingSolute=0; MaxEffectiveRunoff=0
        Solute Urea: Thickness=[250, 250, 250]; InitialValues=[1, 1, 1]; InitialValuesUnits=ppm; WaterTableConcentration=0; D0=0; DepthConstant=0; MaxDepthSoluteAccessible=0; RunoffEffectivenessAtMovingSolute=0; MaxEffectiveRunoff=0
        Water: Thickness=[250, 250, 250]; InitialValues=[0.354, 0.34, 0.276]; InitialPAWmm=96.5; RelativeTo=LL15; FilledFromTop=true
        SoilTemperature Temperature
      Plant Maize
        Cultivar A__1
          Command:
            [Phenology].Emerging.Target.ShootLag.FixedValue=45
            [Phenology].Juvenile.Target.FixedValue = 152
            [Phenology].FlagLeafToFlowering.Target.FixedValue = 54
            [Phenology].FloweringToGrainFilling.Target.FixedValue = 100
            [Phenology].GrainFilling.Target.FixedValue = 550
            [Phenology].MaturityToHarvestRipe.Target.FixedValue = 10
            [Leaf].Photosynthesis.RUE.FixedValue = 2.1
      Irrigation
      Operations Applyirrigation
        12-Apr  [Irrigation].Apply(amount: 7.00, depth: 750, efficiency: 1.0);
        15-Apr  [Irrigation].Apply(amount: 7.00, depth: 750, efficiency: 1.0);
        18-Apr  [Irrigation].Apply(amount: 7.00, depth: 750, efficiency: 1.0);
        21-Apr  [Irrigation].Apply(amount: 7.00, depth: 750, efficiency: 1.0);
        24-Apr  [Irrigation].Apply(amount: 7.00, depth: 750, efficiency: 1.0);
        27-Apr  [Irrigation].Apply(amount: 7.00, depth: 750, efficiency: 1.0);
        01-May  [Irrigation].Apply(amount: 7.00, depth: 750, efficiency: 1.0);
        03-May  [Irrigation].Apply(amount: 7.00, depth: 750, efficiency: 1.0);
        04-May  [Irrigation].Apply(amount: 7.00, depth: 750, efficiency: 1.0);
        06-May  [Irrigation].Apply(amount: 4.67, depth: 750, efficiency: 1.0);
        09-May  [Irrigation].Apply(amount: 9.33, depth: 750, efficiency: 1.0);
        13-May  [Irrigation].Apply(amount: 7.00, depth: 750, efficiency: 1.0);
        16-May  [Irrigation].Apply(amount: 2.33, depth: 750, efficiency: 1.0);
        17-May  [Irrigation].Apply(amount: 11.67, depth: 750, efficiency: 1.0);
        19-May  [Irrigation].Apply(amount: 7.00, depth: 750, efficiency: 1.0);
        20-May  [Irrigation].Apply(amount: 7.00, depth: 750, efficiency: 1.0);
        22-May  [Irrigation].Apply(amount: 7.00, depth: 750, efficiency: 1.0);
        24-May  [Irrigation].Apply(amount: 7.00, depth: 750, efficiency: 1.0);
        25-May  [Irrigation].Apply(amount: 7.00, depth: 750, efficiency: 1.0);
        26-May  [Irrigation].Apply(amount: 7.00, depth: 750, efficiency: 1.0);
        27-May  [Irrigation].Apply(amount: 7.00, depth: 750, efficiency: 1.0);
        28-May  [Irrigation].Apply(amount: 7.00, depth: 750, efficiency: 1.0);
        29-May  [Irrigation].Apply(amount: 2.33, depth: 750, efficiency: 1.0);
        30-May  [Irrigation].Apply(amount: 11.67, depth: 750, efficiency: 1.0);
        31-May  [Irrigation].Apply(amount: 7.00, depth: 750, efficiency: 1.0);
        01-Jun  [Irrigation].Apply(amount: 7.00, depth: 750, efficiency: 1.0);
        02-Jun  [Irrigation].Apply(amount: 7.00, depth: 750, efficiency: 1.0);
        03-Jun  [Irrigation].Apply(amount: 7.00, depth: 750, efficiency: 1.0);
        04-Jun  [Irrigation].Apply(amount: 7.00, depth: 750, efficiency: 1.0);
        05-Jun  [Irrigation].Apply(amount: 7.00, depth: 750, efficiency: 1.0);
        06-Jun  [Irrigation].Apply(amount: 7.00, depth: 750, efficiency: 1.0);
        07-Jun  [Irrigation].Apply(amount: 7.00, depth: 750, efficiency: 1.0);
        08-Jun  [Irrigation].Apply(amount: 7.00, depth: 750, efficiency: 1.0);
        09-Jun  [Irrigation].Apply(amount: 7.00, depth: 750, efficiency: 1.0);
        10-Jun  [Irrigation].Apply(amount: 7.00, depth: 750, efficiency: 1.0);
        12-Jun  [Irrigation].Apply(amount: 2.33, depth: 750, efficiency: 1.0);
        13-Jun  [Irrigation].Apply(amount: 11.67, depth: 750, efficiency: 1.0);
        14-Jun  [Irrigation].Apply(amount: 7.00, depth: 750, efficiency: 1.0);
        15-Jun  [Irrigation].Apply(amount: 7.00, depth: 750, efficiency: 1.0);
        16-Jun  [Irrigation].Apply(amount: 7.00, depth: 750, efficiency: 1.0);
        17-Jun  [Irrigation].Apply(amount: 7.00, depth: 750, efficiency: 1.0);
        18-Jun  [Irrigation].Apply(amount: 7.00, depth: 750, efficiency: 1.0);
        19-Jun  [Irrigation].Apply(amount: 7.00, depth: 750, efficiency: 1.0);
        20-Jun  [Irrigation].Apply(amount: 7.00, depth: 750, efficiency: 1.0);
        21-Jun  [Irrigation].Apply(amount: 7.00, depth: 750, efficiency: 1.0);
        22-Jun  [Irrigation].Apply(amount: 7.00, depth: 750, efficiency: 1.0);
        23-Jun  [Irrigation].Apply(amount: 7.00, depth: 750, efficiency: 1.0);
        24-Jun  [Irrigation].Apply(amount: 7.00, depth: 750, efficiency: 1.0);
        25-Jun  [Irrigation].Apply(amount: 2.33, depth: 750, efficiency: 1.0);
        26-Jun  [Irrigation].Apply(amount: 11.67, depth: 750, efficiency: 1.0);
        27-Jun  [Irrigation].Apply(amount: 7.00, depth: 750, efficiency: 1.0);
        28-Jun  [Irrigation].Apply(amount: 7.00, depth: 750, efficiency: 1.0);
        29-Jun  [Irrigation].Apply(amount: 7.00, depth: 750, efficiency: 1.0);
        30-Jun  [Irrigation].Apply(amount: 7.00, depth: 750, efficiency: 1.0);
        01-Jul  [Irrigation].Apply(amount: 2.33, depth: 750, efficiency: 1.0);
        02-Jul  [Irrigation].Apply(amount: 11.67, depth: 750, efficiency: 1.0);
        03-Jul  [Irrigation].Apply(amount: 7.00, depth: 750, efficiency: 1.0);
        04-Jul  [Irrigation].Apply(amount: 2.33, depth: 750, efficiency: 1.0);
        05-Jul  [Irrigation].Apply(amount: 11.67, depth: 750, efficiency: 1.0);
        06-Jul  [Irrigation].Apply(amount: 7.00, depth: 750, efficiency: 1.0);
        07-Jul  [Irrigation].Apply(amount: 7.00, depth: 750, efficiency: 1.0);
        08-Jul  [Irrigation].Apply(amount: 7.00, depth: 750, efficiency: 1.0);
        09-Jul  [Irrigation].Apply(amount: 7.00, depth: 750, efficiency: 1.0);
        10-Jul  [Irrigation].Apply(amount: 7.00, depth: 750, efficiency: 1.0);
      Manager Sow on a fixed date
        Crop = [Maize]
        SowDate = 23-Mar
        CultivarName = A__1
        SowingDepth = 30
        RowSpacing = 750
        Population = 10
```csharp
using APSIM.Shared.Utilities;
using Models.Utilities;
using Models.Soils;
using Models.PMF;
using Models.Core;
using System;
using System.Linq;

namespace Models
{
    [Serializable]
    public class Script : Model
    {
        [Link] Clock Clock;
        [Link] Fertiliser Fertiliser;
        [Link] Summary Summary;
        [Link] Soil Soil;
        
        [Description("Crop")]
        public IPlant Crop { get; set; }

        [Description("Sowing date (d-mmm)")]
        public string SowDate { get; set; }

        [Display(Type = DisplayType.CultivarName)]
        [Description("Cultivar to be sown")]
        public string CultivarName { get; set; }

        [Description("Sowing depth (mm)")]
        public double SowingDepth { get; set; }

        [Description("Row spacing (mm)")]
        public double RowSpacing { get; set; }

        [Description("Plant population (/m2)")]
        public double Population { get; set; }

        [EventSubscribe("DoManagement")]
        private void OnDoManagement(object sender, EventArgs e)
        {
            if (DateUtilities.WithinDates(SowDate, Clock.Today, SowDate))
            {
                Crop.Sow(population: Population, cultivar: CultivarName, depth: SowingDepth, rowSpacing: RowSpacing);    
            }
        }
    }
}
```
      Manager Fertilise at sowing
        Crop = [Maize]
        FertiliserType = DAP
        Amount = 33
```csharp
using Models.Soils;
using System;
using System.Linq;
using Models.Core;
using Models.PMF;
namespace Models
{
    [Serializable]
    public class Script : Model
    {
        [Link] Clock Clock;
        [Link] Fertiliser Fertiliser;
        
        [Description("Crop to be fertilised")]
        public IPlant Crop { get; set; }

        [Description("Type of fertiliser to apply? ")] 
        [Display(Type = DisplayType.FertiliserType)]public string FertiliserType { get; set; }
    
        [Description("Amount of fertiliser to be applied (kg/ha)")]
        public double Amount { get; set; }
        
        [EventSubscribe("Sowing")]
        private void OnSowing(object sender, EventArgs e)
        {
            Model crop = sender as Model;
            if (Crop != null && crop.Name.ToLower() == (Crop as IModel).Name.ToLower())
                Fertiliser.Apply(amount: Amount, type: FertiliserType);
        }
    }
}
```
      Manager Fertilise at sowing1
        Crop = [Maize]
        FertiliserType = UreaGranular
        Amount = 0
        script: same as in Simulatis.Field.Fertilise at sowing
      Manager Fertilise topup
        FertiliserType = NH4NO3N
        Threshold = 37
        FertiliseDepth = 750
```csharp
using Models.Soils;
using APSIM.Shared.Utilities;
using Models.Soils.Nutrients;
using Models.PMF;
using Models.Core;
using System;
using System.Linq;
using Models.Soils.Nutrients;
namespace Models
{
    [Serializable]
    public class Script : Model
    {
        [Link] Clock Clock;
        [Link] Fertiliser Fertiliser;
        [Link(ByName=true)] Solute NO3;

        [Description("Type of fertiliser to apply? ")] 
        [Display(Type = DisplayType.FertiliserType)]public string FertiliserType { get; set; }
    
        [Description("Threshold amount of NO3 to topup to (kg/ha)")]
        public double Threshold { get; set;}
        
        [Description("Fertilise depth (mm)")]
        public double FertiliseDepth { get; set; }
        
        [EventSubscribe("DoManagement")]
        private void OnDoManagement(object sender, EventArgs e)
        {
            double Amount = Threshold - MathUtilities.Sum(NO3.kgha);
            Fertiliser.Apply(amount: Amount, type: FertiliserType, depth: FertiliseDepth);
        }
    }
}
```
      Manager Fertilise topup1
        FertiliserType = UreaGranular
        Threshold = 0
        FertiliseDepth = 750
        script: same as in Simulatis.Field.Fertilise topup
      Manager Harvest
        Crop = [Maize]
```csharp
using APSIM.Shared.Utilities;
using Models.Utilities;
using Models.Soils;
using Models.PMF;
using Models.Core;
using System;
using System.Linq;

namespace Models
{
    [Serializable] 
    public class Script : Model
    {
        [Description("Crop")]
        public IPlant Crop { get; set; }
        
        [EventSubscribe("DoManagement")]
        private void OnDoManagement(object sender, EventArgs e)
        {
            if (Crop.IsReadyForHarvesting)
            {
                Crop.Harvest();
                Crop.EndCrop();
            }
        }
    }
}
```
  DataStore
    ExcelInput: FileNames=[C:\Users\Amine\Downloads\OBB.xlsx]; SheetNames=[A]
    PredictedObserved: PredictedTableName=Report; ObservedTableName=A; FieldNameUsedForMatch=Clock.Today.DayOfYear-Maize.SowingDate.DayOfYear+1; FieldName2UsedForMatch=Clock.Today.DayOfYear-Maize.SowingDate.DayOfYear+1; FieldName3UsedForMatch=TotalSWC; FieldName4UsedForMatch=TotalSWC; AllColumns=true
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